# OpenSim document version 30000
Model subject01:
  length_units: meters
  force_units: N
  gravity: 0 -9.80665 0
  credits:
    Delp S.L., Loan J.P., Hoy M.G., Zajac F.E., Topp E.L., Rosen J.M., Thelen D.G., Anderson F.C., Seth A. Notes: 3D, 23 DOF gait model created by D.G. Thelen, Univ. of Wisconsin-Madison, and Ajay Seth, Frank C. Anderson, and Scott L. Delp, Stanford University. Lower extremity joint defintions based on Delp et al. (1990). Low back joint and anthropometry based on Anderson and Pandy (1999, 2001). Planar knee model of Yamaguchi and Zajac (1989). Seth replaced tibia translation constraints with a CustomJoint for the knee and removed the patella to eliminate all kinematic constraints; insertions of the quadrucepts are handled with moving points in the tibia frame as defined by Delp 1990. License: Creative Commons (CCBY 3.0). You are free to distribute, remix, tweak, and build upon this work, even commercially, as long as you credit us for the original creation. http://creativecommons.org/licenses/by/3.0/ More Information: http://simtk-confluence.stanford.edu:8080/display/OpenSim/Gait+2392+and+2354+Models
  publications:
    Delp, S.L., Loan, J.P., Hoy, M.G., Zajac, F.E., Topp E.L., Rosen, J.M.: An interactive graphics-based model of the lower extremity to study orthopaedic surgical procedures, IEEE Transactions on Biomedical Engineering, vol. 37, pp. 757-767, 1990. Yamaguchi G.T., Zajac F.E.: A planar model of the knee joint to characterize the knee extensor mechanism." J . Biomecl7. vol. 21. pp. 1-10. 1989. Anderson F.C., Pandy M.G.: A dynamic optimization solution for vertical jumping in three dimensions. Computer Methods in Biomechanics and Biomedical Engineering 2:201-231, 1999. Anderson F.C., Pandy M.G.: Dynamic optimization of human walking. Journal of Biomechanical Engineering 123:381-390, 2001.
  BodySet:
    Body ground: mass=0 mass_center=(0 0 0) inertia_xx=0 inertia_yy=0 inertia_zz=0 meshes=treadmill.vtp
    Body pelvis: mass=11.37517 mass_center=(-0.0724376 0 0) inertia_xx=0.1042331 inertia_yy=0.08831422
        inertia_zz=0.05870716 meshes=(sacrum.vtp pelvis.vtp l_pelvis.vtp)
      CustomJoint ground_pelvis: parent_body=ground location_in_parent=(0 0 0) location=(0 0 0)
        Coordinate pelvis_tilt: motion_type=rotational default_value=0 range=(-1.570796 1.570796) clamped=false
            locked=true
        Coordinate pelvis_list: motion_type=rotational default_value=0 range=(-1.570796 1.570796) clamped=false
            locked=true
        Coordinate pelvis_rotation: motion_type=rotational default_value=0 range=(-1.570796 1.570796) clamped=false
            locked=true
        Coordinate pelvis_tx: motion_type=translational default_value=0 range=(-5 5) clamped=false locked=true
        Coordinate pelvis_ty: motion_type=translational default_value=0 range=(-1 2) clamped=false locked=true
        Coordinate pelvis_tz: motion_type=translational default_value=0 range=(-3 3) clamped=false locked=true
        SpatialTransform:
          TransformAxis rotation1: coordinates=pelvis_tilt axis=(0 0 1) LinearFunction(coefficients=1 0)
          TransformAxis rotation2: coordinates=pelvis_list axis=(1 0 0) LinearFunction(coefficients=1 0)
          TransformAxis rotation3: coordinates=pelvis_rotation axis=(0 1 0) LinearFunction(coefficients=1 0)
          TransformAxis translation1: coordinates=pelvis_tx axis=(1 0 0) LinearFunction(coefficients=1 0)
          TransformAxis translation2: coordinates=pelvis_ty axis=(0 1 0) LinearFunction(coefficients=1 0)
          TransformAxis translation3: coordinates=pelvis_tz axis=(0 0 1) LinearFunction(coefficients=1 0)
    Body femur_r: mass=8.984038 mass_center=(0 -0.195031 0) inertia_xx=0.1702207 inertia_yy=0.04462096
        inertia_zz=0.1795009 meshes=femur.vtp
      CustomJoint hip_r: parent_body=pelvis location_in_parent=(-0.0724376 -0.06772454 0.08555218) location=(0 0 0)
        Coordinate hip_flexion_r: motion_type=rotational default_value=1.570796 range=(-2.094395 2.094395)
            clamped=false locked=true
        Coordinate hip_adduction_r: motion_type=rotational default_value=0 range=(-2.094395 2.094395) clamped=false
            locked=true
        Coordinate hip_rotation_r: motion_type=rotational default_value=0 range=(-2.094395 2.094395) clamped=false
            locked=true
        SpatialTransform: axes_held_at_zero=(translation1 translation2 translation3)
          TransformAxis rotation1: coordinates=hip_flexion_r axis=(0 0 1) LinearFunction(coefficients=1 0)
          TransformAxis rotation2: coordinates=hip_adduction_r axis=(1 0 0) LinearFunction(coefficients=1 0)
          TransformAxis rotation3: coordinates=hip_rotation_r axis=(0 1 0) LinearFunction(coefficients=1 0)
    Body tibia_r: mass=3.581001 mass_center=(0 -0.184557 0) inertia_xx=0.04756937 inertia_yy=0.004813567
        inertia_zz=0.04823005 meshes=(tibia.vtp fibula.vtp)
      CustomJoint knee_r: parent_body=femur_r location_in_parent=(0 0 0) location=(0 0 0)
        Coordinate knee_angle_r: motion_type=rotational default_value=0 range=(-2.094395 0.1745329) clamped=true
        SpatialTransform: axes_held_at_zero=(rotation2 rotation3 translation3)
          TransformAxis rotation1: coordinates=knee_angle_r axis=(0 0 1) LinearFunction(coefficients=1 0)
          TransformAxis translation1: coordinates=knee_angle_r axis=(1 0 0)
            MultiplierFunction: scale=1.14724
              SimmSpline: x=(-2.0944 -1.74533 -1.39626 -1.0472 -0.698132 -0.349066 -0.174533 0.197344 0.337395 0.490178 1.52146 2.0944)
                  y=(-0.0032 0.00179 0.00411 0.0041 0.00212 -0.001 -0.0031 -0.005227 -0.005435 -0.005574 -0.005435 -0.00525)
          TransformAxis translation2: coordinates=knee_angle_r axis=(0 1 0)
            MultiplierFunction: scale=1.14724
              SimmSpline: x=(-2.0944 -1.22173 -0.523599 -0.349066 -0.174533 0.159149 2.0944)
                  y=(-0.4226 -0.4082 -0.399 -0.3976 -0.3966 -0.395264 -0.396)
    Body talus_r: mass=0.09658802 mass_center=(0 0 0) inertia_xx=0.001198606 inertia_yy=0.001198606
        inertia_zz=0.001198606 meshes=talus.vtp
      CustomJoint ankle_r: parent_body=tibia_r location_in_parent=(0 -0.4250649 0) location=(0 0 0)
        Coordinate ankle_angle_r: motion_type=rotational default_value=0 range=(-1.570796 1.570796) clamped=false
            locked=true
        SpatialTransform: axes_held_at_zero=(rotation2 rotation3 translation1 translation2 translation3)
          TransformAxis rotation1: coordinates=ankle_angle_r axis=(-0.1050135 -0.1740224 0.9791263)
              LinearFunction(coefficients=1 0)
    Body calcn_r: mass=1.20735 mass_center=(0.102708 0.0308125 0) inertia_xx=0.001426474 inertia_yy=0.003973749
        inertia_zz=0.004177531 meshes=foot.vtp
      CustomJoint subtalar_r: parent_body=talus_r location_in_parent=(-0.05432871 -0.04673138 0.008822706)
          location=(0 0 0)
        Coordinate subtalar_angle_r: motion_type=rotational default_value=0 range=(-1.570796 1.570796) clamped=false
            locked=true
        SpatialTransform: axes_held_at_zero=(rotation2 rotation3 translation1 translation2 translation3)
          TransformAxis rotation1: coordinates=subtalar_angle_r axis=(0.7871796 0.6047475 -0.1209495)
              LinearFunction(coefficients=1 0)
    Body toes_r: mass=0.2092097 mass_center=(0.0355371 0.00616251 -0.017974) inertia_xx=0.000101891
        inertia_yy=0.000203782 inertia_zz=0.000101891 meshes=bofoot.vtp
      CustomJoint mtp_r: parent_body=calcn_r location_in_parent=(0.1836428 -0.00205417 0.001109252) location=(0 0 0)
        Coordinate mtp_angle_r: motion_type=rotational default_value=0 range=(-1.570796 1.570796) clamped=false
            locked=true
        SpatialTransform: axes_held_at_zero=(rotation2 rotation3 translation1 translation2 translation3)
          TransformAxis rotation1: coordinates=mtp_angle_r axis=(-0.5809544 0 0.8139361)
              LinearFunction(coefficients=1 0)
    Body femur_l: mass=8.984038 mass_center=(0 -0.195031 0) inertia_xx=0.1702207 inertia_yy=0.04462096
        inertia_zz=0.1795009 meshes=l_femur.vtp
      CustomJoint hip_l: parent_body=pelvis location_in_parent=(-0.0724376 -0.06772454 -0.08555218) location=(0 0 0)
        Coordinate hip_flexion_l: motion_type=rotational default_value=1.570796 range=(-2.094395 2.094395)
            clamped=false locked=true
        Coordinate hip_adduction_l: motion_type=rotational default_value=0 range=(-2.094395 2.094395) clamped=false
            locked=true
        Coordinate hip_rotation_l: motion_type=rotational default_value=0 range=(-2.094395 2.094395) clamped=false
            locked=true
        SpatialTransform: axes_held_at_zero=(translation1 translation2 translation3)
          TransformAxis rotation1: coordinates=hip_flexion_l axis=(0 0 1) LinearFunction(coefficients=1 0)
          TransformAxis rotation2: coordinates=hip_adduction_l axis=(-1 0 0) LinearFunction(coefficients=1 0)
          TransformAxis rotation3: coordinates=hip_rotation_l axis=(0 -1 0) LinearFunction(coefficients=1 0)
    Body tibia_l: mass=3.581001 mass_center=(0 -0.184557 0) inertia_xx=0.04756937 inertia_yy=0.004813567
        inertia_zz=0.04823005 meshes=(l_tibia.vtp l_fibula.vtp)
      CustomJoint knee_l: parent_body=femur_l location_in_parent=(0 0 0) location=(0 0 0)
        Coordinate knee_angle_l: motion_type=rotational default_value=-1.570796 range=(-2.094395 0.1745329)
            clamped=false locked=true
        SpatialTransform: axes_held_at_zero=(rotation2 rotation3 translation3)
          TransformAxis rotation1: coordinates=knee_angle_l axis=(0 0 1) LinearFunction(coefficients=1 0)
          TransformAxis translation1: coordinates=knee_angle_l axis=(1 0 0)
            MultiplierFunction: scale=1.14724
              SimmSpline: x=(-2.0944 -1.74533 -1.39626 -1.0472 -0.698132 -0.349066 -0.174533 0.197344 0.337395 0.490178 1.52146 2.0944)
                  y=(-0.0032 0.00179 0.00411 0.0041 0.00212 -0.001 -0.0031 -0.005227 -0.005435 -0.005574 -0.005435 -0.00525)
          TransformAxis translation2: coordinates=knee_angle_l axis=(0 1 0)
            MultiplierFunction: scale=1.14724
              SimmSpline: x=(-2.0944 -1.22173 -0.523599 -0.349066 -0.174533 0.159149 2.0944)
                  y=(-0.4226 -0.4082 -0.399 -0.3976 -0.3966 -0.395264 -0.396)
    Body talus_l: mass=0.09658802 mass_center=(0 0 0) inertia_xx=0.001198606 inertia_yy=0.001198606
        inertia_zz=0.001198606 meshes=l_talus.vtp
      CustomJoint ankle_l: parent_body=tibia_l location_in_parent=(0 -0.4250649 0) location=(0 0 0)
        Coordinate ankle_angle_l: motion_type=rotational default_value=0 range=(-1.047198 1.047198) clamped=false
            locked=true
        SpatialTransform: axes_held_at_zero=(rotation2 rotation3 translation1 translation2 translation3)
          TransformAxis rotation1: coordinates=ankle_angle_l axis=(0.1050135 0.1740224 0.9791263)
              LinearFunction(coefficients=1 0)
    Body calcn_l: mass=1.20735 mass_center=(0.102708 0.0308125 0) inertia_xx=0.001426474 inertia_yy=0.003973749
        inertia_zz=0.004177531 meshes=l_foot.vtp
      CustomJoint subtalar_l: parent_body=talus_l location_in_parent=(-0.05432871 -0.04673138 -0.008822706)
          location=(0 0 0)
        Coordinate subtalar_angle_l: motion_type=rotational default_value=0 range=(-1.570796 1.570796) clamped=false
            locked=true
        SpatialTransform: axes_held_at_zero=(rotation2 rotation3 translation1 translation2 translation3)
          TransformAxis rotation1: coordinates=subtalar_angle_l axis=(-0.7871796 -0.6047475 -0.1209495)
              LinearFunction(coefficients=1 0)
    Body toes_l: mass=0.2092097 mass_center=(0.0355371 0.00616251 0.017974) inertia_xx=0.000101891
        inertia_yy=0.000203782 inertia_zz=0.000101891 meshes=l_bofoot.vtp
      CustomJoint mtp_l: parent_body=calcn_l location_in_parent=(0.1836428 -0.00205417 -0.001109252) location=(0 0 0)
        Coordinate mtp_angle_l: motion_type=rotational default_value=0 range=(-1.047198 1.047198) clamped=false
            locked=true
        SpatialTransform: axes_held_at_zero=(rotation2 rotation3 translation1 translation2 translation3)
          TransformAxis rotation1: coordinates=mtp_angle_l axis=(0.5809544 0 0.8139361)
              LinearFunction(coefficients=1 0)
    Body torso: mass=33.06845 mass_center=(-0.0323916 0.34551 0) inertia_xx=1.660314 inertia_yy=0.8507069
        inertia_zz=1.611783 meshes=(hat_spine.vtp hat_jaw.vtp hat_skull.vtp hat_ribs.vtp)
      CustomJoint back: parent_body=pelvis location_in_parent=(-0.1031749 0.08350303 0) location=(0 0 0)
        Coordinate lumbar_extension: motion_type=rotational default_value=0 range=(-1.570796 1.570796) clamped=false
            locked=true
        Coordinate lumbar_bending: motion_type=rotational default_value=0 range=(-1.570796 1.570796) clamped=false
            locked=true
        Coordinate lumbar_rotation: motion_type=rotational default_value=0 range=(-1.570796 1.570796) clamped=false
            locked=true
        SpatialTransform: axes_held_at_zero=(translation1 translation2 translation3)
          TransformAxis rotation1: coordinates=lumbar_extension axis=(0 0 1) LinearFunction(coefficients=1 0)
          TransformAxis rotation2: coordinates=lumbar_bending axis=(1 0 0) LinearFunction(coefficients=1 0)
          TransformAxis rotation3: coordinates=lumbar_rotation axis=(0 1 0) LinearFunction(coefficients=1 0)
    Body ExoCoxa: mass=0.45 mass_center=(0 0 0) inertia_xx=1 inertia_yy=1 inertia_zz=1 meshes=junta_fixa_corrigida.stl
      WeldJoint exohip_r: parent_body=femur_r location_in_parent=(-0.0122755 -0.09 0.0644478) location=(0 0 0)
    Body ExoPerna: mass=0.45 mass_center=(0 0 0) inertia_xx=1 inertia_yy=1 inertia_zz=1
        meshes=junta_movel_corrigida.stl
      WeldJoint exoknee_r: parent_body=tibia_r location_in_parent=(-0.0068 -0.016678 0.06) location=(0 0 0)
  ForceSet:
    Millard2012EquilibriumMuscle [values shared by the 5 below unless stated]: min_control=0 max_control=1
        optimal_force=1 pennation_angle_at_optimal=0.08726646 [radians] max_contraction_velocity=10
        activation_time_constant=0.01 [seconds] deactivation_time_constant=0.04 [seconds] minimum_activation=0.01
      ActiveForceLengthCurve: minimum_value=0
      ForceVelocityCurve: concentric_slope_at_vmax=0 concentric_slope_near_vmax=0.25 isometric_slope=5
          eccentric_slope_at_vmax=0 eccentric_slope_near_vmax=0.15 max_eccentric_velocity_force_multiplier=1.4
      FiberForceLengthCurve
      TendonForceLengthCurve
    Millard2012EquilibriumMuscle semitendinoso: max_isometric_force=410 optimal_fiber_length=0.2252741
        tendon_slack_length=0.2863559
      PathPoint semiten_r-P1: pelvis (-0.129455 -0.112581 0.0618742)
      ConditionalPathPoint semiten_r-P2: tibia_r (-0.0415476 -0.0282619 -0.0225087) range=(-0.331613 0.174533)
          coordinate=knee_angle_r
      PathPoint semiten_r-P3: tibia_r (-0.0328387 -0.0522138 -0.0226174)
      PathPoint semiten_r-P4: tibia_r (-0.0111703 -0.0737438 -0.0242188)
      PathPoint semiten_r-P5: tibia_r (0.00266901 -0.0945028 -0.0190785)
    Millard2012EquilibriumMuscle bisceps_femoris: max_isometric_force=896 optimal_fiber_length=0.1236311
        tendon_slack_length=0.369759 pennation_angle_at_optimal=0
      PathPoint bifemlh_r-P1: pelvis (-0.129056 -0.105091 0.0711466)
      PathPoint bifemlh_r-P2: tibia_r (-0.0297545 -0.0355868 0.0290922)
      PathPoint bifemlh_r-P3: tibia_r (-0.0231314 -0.0556538 0.0339063)
    Millard2012EquilibriumMuscle rectus_femoris: max_isometric_force=1169 optimal_fiber_length=0.1304623
        tendon_slack_length=0.354766
      PathPoint rect_fem_r-P1: pelvis (-0.030225 -0.0318643 0.0991791)
      ConditionalPathPoint rect_fem_r-P2: femur_r (0.0383178 -0.462338 0.00217976) range=(-2.61799 -1.45997)
          coordinate=knee_angle_r
      MovingPathPoint rect_fem_r-P3: tibia_r (0.0385408 0.0243554 0.00138393) x_coordinate=knee_angle_r
          y_coordinate=knee_angle_r z_coordinate=knee_angle_r
        x_location: MultiplierFunction: scale=0.988523
          SimmSpline: x=(-2.0944 -1.99997 -1.5708 -1.45752 -1.39626 -1.0472 -0.698132 -0.526391 -0.349066 -0.174533 0 0.00017453 0.00034907 0.0279253 0.0872665 0.174533 2.0944)
              y=(0.0155805 0.0179938 0.0275081 0.0296564 0.0307615 0.0365695 0.0422074 0.0450902 0.048391 0.0534299 0.0617576 0.0617669 0.0617762 0.0633083 0.066994 0.0733035 0.0573481)
        y_location: MultiplierFunction: scale=0.988523
          SimmSpline: x=(-2.0944 -1.99997 -1.5708 -1.45752 -1.39626 -1.0472 -0.698132 -0.526391 -0.349066 -0.174533 0 0.00017453 0.00034907 0.0279253 0.0872665 0.174533 2.0944)
              y=(0.0234116 0.0237613 0.0251141 0.0252795 0.0253146 0.0249184 0.0242373 0.0238447 0.0234197 0.0227644 0.020984 0.0209814 0.0209788 0.0205225 0.0191754 0.0159554 -0.0673774)
        z_location: MultiplierFunction: scale=0.988523
          SimmSpline: x=(-2.0944 0.1745) y=(0.0014 0.0014)
    Millard2012EquilibriumMuscle vastus_medialis: max_isometric_force=1294 optimal_fiber_length=0.1031382
        tendon_slack_length=0.1460159
      PathPoint vas_med_r-P1: femur_r (0.0160614 -0.240806 0.0215681)
      PathPoint vas_med_r-P2: femur_r (0.0408417 -0.317671 0.00103252)
      ConditionalPathPoint vas_med_r-P3: femur_r (0.0424479 -0.464403 -0.0143405) range=(-2.61799 -1.21004)
          coordinate=knee_angle_r
      ConditionalPathPoint vas_med_r-P4: femur_r (0.0314344 -0.488151 -0.0150288) range=(-2.61799 -1.78006)
          coordinate=knee_angle_r
      MovingPathPoint vas_med_r-P5: tibia_r (0.032829 0.0234201 -0.0144324) x_coordinate=knee_angle_r
          y_coordinate=knee_angle_r z_coordinate=knee_angle_r
        x_location: MultiplierFunction: scale=0.988523
          SimmSpline: x=(-2.0944 -1.99997 -1.5708 -1.45752 -1.39626 -1.0472 -0.698132 -0.526391 -0.349066 -0.174533 0 0.00017453 0.00034907 0.0279253 0.0872665 0.174533 2.0944)
              y=(0.00981097 0.0122243 0.0217371 0.0238851 0.0249902 0.0307959 0.0364187 0.0392871 0.0425654 0.0475764 0.0559586 0.0559681 0.0559776 0.0575419 0.0613368 0.0679503 0.0629332)
        y_location: MultiplierFunction: scale=0.988523
          SimmSpline: x=(-2.0944 -1.99997 -1.5708 -1.45752 -1.39626 -1.0472 -0.698132 -0.526391 -0.349066 -0.174533 0 0.00017453 0.00034907 0.0279253 0.0872665 0.174533 2.0944)
              y=(0.0224154 0.0227651 0.0241265 0.0242933 0.0243287 0.0239462 0.0233593 0.0230677 0.0228342 0.0226362 0.0217917 0.0217903 0.0217889 0.0215365 0.0206842 0.0183269 -0.0656205)
        z_location: MultiplierFunction: scale=0.988523
          SimmSpline: x=(-2.0944 2.0944) y=(-0.0146 -0.0146)
    Millard2012EquilibriumMuscle vastus_laterais: max_isometric_force=1871 optimal_fiber_length=0.09705652
        tendon_slack_length=0.1814032
      PathPoint vas_lat_r-P1: femur_r (0.00550675 -0.212698 0.0400387)
      PathPoint vas_lat_r-P2: femur_r (0.0308608 -0.29725 0.0469221)
      ConditionalPathPoint vas_lat_r-P3: femur_r (0.0414154 -0.462338 0.0235184) range=(-2.61799 -1.21004)
          coordinate=knee_angle_r
      ConditionalPathPoint vas_lat_r-P4: femur_r (0.0290252 -0.486774 0.0211092) range=(-2.61799 -1.92004)
          coordinate=knee_angle_r
      MovingPathPoint vas_lat_r-P5: tibia_r (0.0372488 0.0225081 0.0163106) x_coordinate=knee_angle_r
          y_coordinate=knee_angle_r z_coordinate=knee_angle_r
        x_location: MultiplierFunction: scale=0.988523
          SimmSpline: x=(-2.0944 -1.99997 -1.5708 -1.45752 -1.39626 -1.0472 -0.698132 -0.526391 -0.349066 -0.174533 0 0.00017453 0.00034907 0.0279253 0.0872665 0.174533 2.0944)
              y=(0.0142897 0.016703 0.0262145 0.0283623 0.0294674 0.0352709 0.0408785 0.0437291 0.0469704 0.0518742 0.0599557 0.0599647 0.0599738 0.0614577 0.0650351 0.0711867 0.0583766)
        y_location: MultiplierFunction: scale=0.988523
          SimmSpline: x=(-2.0944 -1.99997 -1.5708 -1.45752 -1.39626 -1.0472 -0.698132 -0.526391 -0.349066 -0.174533 0 0.00017453 0.00034907 0.0279253 0.0872665 0.174533 2.0944)
              y=(0.0215318 0.0218815 0.0232362 0.0234019 0.0234371 0.0230439 0.0223842 0.0220151 0.0216359 0.0210971 0.0195864 0.0195842 0.019582 0.01919 0.018008 0.0151073 -0.0653421)
        z_location: MultiplierFunction: scale=0.988523
          SimmSpline: x=(-2.0944 2.0944) y=(0.0165 0.0165)
    CoordinateActuator knee_actuator: coordinate=knee_angle_r optimal_force=100
