Model:
  assembly_accuracy: 1e-9
  gravity: 0 0 0
  publications: List of publications related to model...
  length_units: meters
  force_units: N
  credits:
    Frank Anderson, Peter Loan, Ayman Habib, Ajay Seth, Michael Sherman
  Ground
  BodySet:
    Body body_1: mass=1 [kg] mass_center=(0 0 0) inertia=(1 1 1 0 0 0)
      PhysicalOffsetFrame: socket_parent=.. translation=(0 0 0) [meters] orientation=(1.570796 0 0) [radians]
        Cylinder _geom_1: scale_factors=(1 1 1) radius=0.5 half_height=0.5
      PhysicalOffsetFrame physicaloffsetframe_0: socket_parent=.. translation=(0 0.75 0)
        Brick _geom_1: scale_factors=(1 1 1) half_lengths=(0.1 0.75 0.25)
      PhysicalOffsetFrame physicaloffsetframe_1: socket_parent=.. translation=(0 1.5 0) orientation=(1.570796 0 0)
        Cylinder _geom_1: scale_factors=(1 1 1) radius=0.25 half_height=0.5
    Body body_1_0: mass=1 mass_center=(0 0 0) inertia=(1 1 1 0 0 0)
      PhysicalOffsetFrame: socket_parent=.. translation=(0 0 0) orientation=(1.570796 0 0)
        Cylinder _geom_1: scale_factors=(1 1 1) radius=0.5 half_height=0.5
      PhysicalOffsetFrame physicaloffsetframe_0: socket_parent=.. translation=(0 0.75 0)
        Brick _geom_1: scale_factors=(1 1 1) half_lengths=(0.1 0.75 0.25)
      PhysicalOffsetFrame physicaloffsetframe_1: socket_parent=.. translation=(0 1.5 0) orientation=(1.570796 0 0)
        Cylinder _geom_1: scale_factors=(1 1 1) radius=0.25 half_height=0.5
  JointSet:
    PinJoint joint_1: socket_parent_frame=ground_offset socket_child_frame=body_1_offset
      Coordinate joint_1_coord_0: default_value=0 range=(-10 10) clamped=false
      PhysicalOffsetFrame ground_offset: socket_parent=/ground translation=(0 1.5 0)
      PhysicalOffsetFrame body_1_offset: socket_parent=/bodyset/body_1 translation=(0 0 0)
    PinJoint joint_1_0: socket_parent_frame=body_1_offset socket_child_frame=body_1_0_offset
      Coordinate joint_1_coord_0: default_value=0 range=(-10 10) clamped=false
      PhysicalOffsetFrame body_1_offset: socket_parent=/bodyset/body_1 translation=(0 1.5 0)
      PhysicalOffsetFrame body_1_0_offset: socket_parent=/bodyset/body_1_0 translation=(0 0 0)
  ForceSet:
    CoordinateActuator: coordinate=joint_1_coord_0 optimal_force=1
    CoordinateActuator coordinateactuator_0: coordinate=joint_1_coord_0 optimal_force=1
    CoordinateActuator coordinateactuator_1: coordinate=joint_1_coord_0 optimal_force=1
    CoordinateActuator coordinateactuator_2: coordinate=joint_1_coord_0 optimal_force=1
  MarkerSet:
    Marker effector_x: body_1_0 (0 1.5 0)
    Marker effector_y: body_1_0 (0 1.5 0)
